# -*- coding: utf-8 -*-
"""
Step 7: we are showing how to add collision detection
and contact management in our project.

The important component to see in the graph are:
- the ones added by the addContact function
- the one in the "Collision" part of the tripod object
- the one in the "Collision" part of the Sphere object
"""
import Sofa
from splib.constants import Key
from stlib.physics.rigid import Sphere
from tutorial import *
from tripod import Tripod
from tripodcontroller import TripodController


class JumpController(Sofa.PythonScriptController):
    """Press Z/Q to play with the ball"""

    def __init__(self, node, actuators):
        self.actuators = actuators
        self.name = "JumpController"

    def onKeyPressed(self, key):
        apos = None
        if key == Key.Z:
            apos = -3.14/4
        if key == Key.Q:
            apos = -3.14/3

        if apos is not None:
            for actuator in self.actuators:
                actuator.servomotor.angle = apos


def createScene(rootNode):
    scene = Scene(rootNode)

    # Adding contact handling
    addContact(scene, alarmDistance=5, contactDistance=2)

    Sphere(scene.Modelling,
           translation=[0.0, 40.0, 0.0],
           uniformScale=10.,
           totalMass=0.01)

    tripod = Tripod(scene.Modelling)
    TripodController(scene.Modelling, [tripod.ActuatedArm0,tripod.ActuatedArm1, tripod.ActuatedArm2])

    scene.Simulation.addChild(tripod.RigidifiedStructure)
    scene.Simulation.addChild(scene.Modelling.Sphere)
    motors = scene.Simulation.createChild("Motors")
    motors.addChild(tripod.ActuatedArm0)
    motors.addChild(tripod.ActuatedArm1)
    motors.addChild(tripod.ActuatedArm2)

    setTreeData(scene.Modelling, "Rigidified.*/dofs",
                showObject = True,
                showObjectScale = 5.0)
